// COMSOL Multiphysics 6.0.0.405 model "COMSOL_Laplace.mph"
// Outline of the model tree

Parameters
  alpha = 50
  C_0 = 1
  u_0 = 0.4
  Ll = 240*10^-6
  Rr = Ll/alpha
  pos_x = Ll-Rr-1.2*h_ss
  pos_y = 0.5*Ll
  K_eff = C_0/(pi*Rr^2)
  Com_con = C_0/(2*pi*Rr)
  Dd = 1
  h_ss = Ll/cells
  cells = 5

Variables
  var1 "Variables 1"
    D = 1 [m]/(1[s])
    L = Ll[m]
    Da_t = 10
    R = L/alpha
    rho = 1 [kg]/(1[m])^2
    CMRO2 = Da_t*D*rho/L^2

Geometry
  geom1 "Geometry 1" (2D, length unit m)
    sq1: Square | size = Ll
    c1: Circle | pos = {pos_x, pos_y}; r = Rr
    dif1: Difference | input = sq1; input2 = c1
    fin: Finalize "Form Union"

Physics
  lpeq: LaplaceEquation on all domains
    dependent variable u
    leq1: LaplaceEquation (default)
    zflx1: ZeroFluxBoundary "Zero Flux 1" (default)
    init1: init "Initial Values 1" (default)
    flux1: FluxBoundary "Flux/Source 1" on boundaries 5-8 | g = Com_con; q = Com_con
    dir1: DirichletBoundary "Dirichlet Boundary Condition 1" on boundaries 1 | r = 0.2
    pc1: PeriodicCondition on boundaries 2, 3 | destinationDomains: boundaries 3

Mesh
  mesh1 "Mesh 1" (physics-controlled)
    size: MeshSizeDefault | hauto = 3

Studies
  std1 "Study 1"
    stat: Stationary

Solver configurations
  sol1 "Solution 1" (study std1)
    v1: Variables "Dependent Variables 1"
    s1: Stationary "Stationary Solver 1"
      dDef: Direct
      fc1: FullyCoupled | linsolver = dDef

Datasets
  dset1: Solution | solution = sol1
  cln1: CutLine2D "phi along x" | data = dset1; genpoints = {{0, pos_y}, {L, pos_y}}
  cln2: CutLine2D "phi along y" | data = dset1; genpoints = {{pos_x, 0}, {pos_x, L}}
  dset2: Solution | solution = sol1
  cln3: CutLine2D "phi along x_metab" | data = dset1; genpoints = {{0, pos_y}, {L, pos_y}}
  cln4: CutLine2D "phi along y_metab" | data = dset1; genpoints = {{pos_x, 0}, {pos_x, L}}

Derived values
  int1: IntLine "Line Integration 1" on boundaries 5-8
    data = dset1
    table = tbl10
    expr = {u/ (2*pi*Rr), lpeq.g_u}
    descr = {, Boundary flux/source}

Evaluation groups
  eg1: EvaluationGroup | data = dset1
    int1: IntLine "Line Integration 1" on boundaries 5-8 | data = dset1; table = tbl7; expr = {u/(2*pi*Rr), lpeq.g_u}

Tables
  tbl1: Table
    // Line Integration 1
    Boundary flux/source (1)
    0.633109
  tbl2: Table
    // Line Integration 1
    Boundary flux/source (1) | Boundary flux/source (1) | Boundary flux/source (1)
    0.633109 | 0.793119 | 0.793119
  tbl3: Table
    // Line Integration 1
    Boundary flux/source (1)
    0.793119
  tbl4: Table
    // Line Integration 1
    Boundary flux/source (1)
    0.633112
  tbl5: Table
    // Line Integration 1
    u*2*pi*Rr (m) | Boundary flux/source (1)
    3.33711e-10 | 0.633112
  tbl6: Table
    // Line Integration 1
    u/(2*pi*Rr) (m) | Boundary flux/source (1)
    0.366883 | 0.633112
  tbl7: Table
    // Line Integration 1
    u/(2*pi*Rr) (m) | Boundary flux/source (1)
    0.366884 | 0.633112
  tbl8: Table
    // Line Integration 1
    Dependent variable u (m) | lpeq.g_u / (2*pi*Rr^2) (1)
    1.10645e-05 | 4.3735e+09
  tbl9: Table
    // Line Integration 1
    Dependent variable u (m) | lpeq.g_u / (2*pi*Rr) (1)
    1.10645e-05 | 20992.8
  tbl10: Table
    // Line Integration 1
    u/ (2*pi*Rr) (m) | Boundary flux/source (1)
    0.366867 | 0.633128

Plots
  pg1: PlotGroup2D "2D Plot Group 1" | data = dset1
    surf1: Surface | expr = u
  pg2: PlotGroup1D "1D Plot Group 2" | data = cln1
    lngr1: LineGraph "graph phi along x_s"
      data = cln1
      expr = u
      prefixintitle = graph phi along x_s
      title = graph phi along x_s
    lngr2: LineGraph "graph phi along y_s" | data = cln2; expr = u; title = graph phi along y_s

Exports
  plot3: Plot "plot_2D"
    filename = /home/pdavid/Bureau/Code/SS_auto57/2D_cartesian/Updated_BCs/Tool_Validation/COMSOL_output/linear/contour.txt
  plot4: Plot "plot_1D_x"
    filename = /home/pdavid/Bureau/Code/SS_auto57/2D_cartesian/Updated_BCs/Tool_Validation/COMSOL_output/linear/plot_x.txt
  plot5: Plot "plot_1D_y"
    filename = /home/pdavid/Bureau/Code/SS_auto57/2D_cartesian/Updated_BCs/Tool_Validation/COMSOL_output/linear/plot_y.txt
  tbl1: Table
    source = evaluationgroup
    table = tbl4
    evaluationgroup = eg1
    filename = /home/pdavid/Bureau/Code/SS_auto57/2D_cartesian/Updated_BCs/Tool_Validation/COMSOL_output/linear/q.txt