// COMSOL Multiphysics 6.0.0.405 model "COMSOL_metab.mph"
// Outline of the model tree

Parameters
  alpha = 50
  C_0 = 1
  u_0 = 0.4
  Ll = 240*10^-6
  Rr = Ll/alpha
  pos_x = 0.5*Ll
  pos_y = 0.5*Ll
  K_eff = C_0/(pi*Rr^2)
  Com_con = C_0/(2*pi*Rr)
  Dd = 1

Variables
  var1 "Variables 1"
    D = 1 [m]/(1[s])
    L = Ll[m]
    Da_t = 10
    R = L/alpha
    rho = 1 [kg]/(1[m])^2
    CMRO2 = Da_t*D*rho/L^2

Geometry
  geom1 "Geometry 1" (2D, length unit m)
    sq1: Square | size = Ll
    c1: Circle | pos = {pos_x, pos_y}; r = Rr
    dif1: Difference | input = sq1; input2 = c1
    fin: Finalize "Form Union"

Physics
  poeq: PoissonEquation "Poisson's Equation" on all domains
    dependent variable u
    Units.DependentVariableQuantity = none
    Units.CustomDependentVariableUnit = kg/m^2
    Units.CustomSourceTermUnit = kg/(s*m^3)
    peq1: PoissonEquation "Poisson's Equation 1" (default) | f = -CMRO2*(u/(u+u_0))*0; c = {Dd, 0, 0, Dd}
    zflx1: ZeroFluxBoundary "Zero Flux 1" (default)
    init1: init "Initial Values 1" (default)
    dir1: DirichletBoundary "Dirichlet Boundary Condition 1" on boundaries 1-4 | r = 0.2
    flux1: FluxBoundary "Flux/Source 1" on boundaries 5-8 | g = Com_con; q = Com_con
    pc1: PeriodicCondition on boundaries 2, 3 | destinationDomains: boundaries 3
    zflx2: ZeroFluxBoundary "Zero Flux 2" on boundaries 2-4

Mesh
  mesh1 "Mesh 1" (physics-controlled)
    size: MeshSizeDefault | hauto = 4

Studies
  std1 "Study 1"
    stat: Stationary

Solver configurations
  sol1 "Solution 1" (study std1)
    v1: Variables "Dependent Variables 1"
    s1: Stationary "Stationary Solver 1"
      dDef: Direct
      fc1: FullyCoupled | linsolver = dDef

Datasets
  dset1: Solution | solution = sol1
  cln1: CutLine2D "phi along x" | data = dset1; genpoints = {{0, pos_y}, {L, pos_y}}
  cln2: CutLine2D "phi along y" | data = dset1; genpoints = {{pos_x, 0}, {pos_x, L}}
  dset2: Solution | solution = sol1
  cln3: CutLine2D "phi along x_metab" | data = dset1; genpoints = {{0, pos_y}, {L, pos_y}}
  cln4: CutLine2D "phi along y_metab" | data = dset1; genpoints = {{pos_x, 0}, {pos_x, L}}

Evaluation groups
  eg1: EvaluationGroup | data = dset1
    int1: IntLine "Line Integration 1" on boundaries 5-8 | data = dset1; table = tbl1; expr = poeq.g_u

Tables
  tbl1: Table
    // Line Integration 1
    Boundary flux/source (kg/(m*s))
    0.710939

Plots
  pg1: PlotGroup2D "2D Plot Group 1" | data = dset1
    surf1: Surface | expr = u
  pg2: PlotGroup1D "1D Plot Group 2" | data = cln1
    lngr1: LineGraph "graph phi along x_s"
      data = cln1
      expr = u
      prefixintitle = graph phi along x_s
      title = graph phi along x_s
    lngr2: LineGraph "graph phi along y_s" | data = cln2; expr = u; title = graph phi along y_s

Exports
  plot3: Plot "plot_2D"
    filename = /home/pdavid/Bureau/Code/SS_auto57/2D_cartesian/Updated_BCs/Examples/Single_source/base/metab/contour.txt
  plot4: Plot "plot_1D_x"
    filename = /home/pdavid/Bureau/Code/SS_auto57/2D_cartesian/Updated_BCs/Examples/Single_source/base/metab/plot_x.txt
  plot5: Plot "plot_1D_y"
    filename = /home/pdavid/Bureau/Code/SS_auto57/2D_cartesian/Updated_BCs/Examples/Single_source/base/metab/plot_y.txt
  tbl1: Table "base_q" | source = evaluationgroup; table = tbl1