// COMSOL Multiphysics 6.0.0.405 model "COMSOL_metab.mph"
// Outline of the model tree

Parameters
  alpha = 50
  C_0 = 1
  u_0 = 0.4
  Ll = 240*10^-6
  Rr = Ll/alpha
  pos_x = 0.5*Ll
  pos_y = 0.5*Ll
  K_eff = C_0/(pi*Rr^2)
  Com_con = C_0/(2*pi*Rr)
  Dd = 1
  x1 = 110.4*10^-6
  y1 = 27.84*10^-6
  x2 = 70.08*10^-6
  y2 = 56.84*10^-6
  x3 = 139.2*10^-6
  y3 = 68.16*10^-6
  x4 = 68.16*10^-6  // 75.84
  y4 = 75.84*10^-6
  x5 = 129.6*10^-6
  y5 = 87.36*10^-6
  x6 = 219.84*10^-6
  y6 = 102.72*10^-6
  x7 = 208.32*10^-6
  y7 = 106.56*10^-6
  x8 = 75.84*10^-6
  y8 = 139.2*10^-6
  x9 = 127*10^-6
  y9 = 148.8*10^-6
  x10 = 140*10^-6
  y10 = 150.72*10^-6
  x11 = 152.64*10^-6
  y11 = 152.64*10^-6
  x12 = 48.96*10^-6
  y12 = 168*10^-6
  x13 = 52.8*10^-6
  y13 = 202.56*10^-6
  x14 = 62.4*10^-6
  y14 = 191.04*10^-6
  x15 = 77.76*10^-6
  y15 = 212.16*10^-6
  x16 = 177.6*10^-6
  y16 = 187.2*10^-6
  x17 = 183.36*10^-6
  y17 = 200.64*10^-6

Variables
  var1 "Variables 1"
    D = 1 [m]/(1[s])
    L = Ll[m]
    Da_t = 10
    R = L/alpha
    rho = 1 [kg]/(1[m])^2
    CMRO2 = Da_t*D*rho/L^2

Geometry
  geom1 "Geometry 1" (2D, length unit m)
    sq1: Square | size = Ll
    c1: Circle | pos = {x1, y1}; r = Rr
    c2: Circle | pos = {x2, y2}; r = Rr
    c3: Circle | pos = {x3, y3}; r = Rr
    c4: Circle | pos = {x4, y4}; r = Rr
    c5: Circle | pos = {x5, y5}; r = Rr
    c6: Circle | pos = {x6, y6}; r = Rr
    c7: Circle | pos = {x7, y7}; r = Rr
    c8: Circle | pos = {x8, y8}; r = Rr
    c9: Circle | pos = {x9, y9}; r = Rr
    c10: Circle | pos = {x10, y10}; r = Rr
    c11: Circle | pos = {x11, y11}; r = Rr
    c12: Circle | pos = {x12, y12}; r = Rr
    c13: Circle | pos = {x13, y13}; r = Rr
    c14: Circle | pos = {x14, y14}; r = Rr
    c15: Circle | pos = {x15, y15}; r = Rr
    c16: Circle | pos = {x16, y16}; r = Rr
    c17: Circle | pos = {x17, y17}; r = Rr
    dif1: Difference | input = sq1; input2 = c1, c10, c11, c12, c13, c14, c15, c16, c17, c2, c3, c4, c5, c6, c7, c8, c9
    fin: Finalize "Form Union"

Physics
  poeq: PoissonEquation "Poisson's Equation" on all domains
    dependent variable u
    Units.DependentVariableQuantity = none
    Units.CustomDependentVariableUnit = kg/m^2
    Units.CustomSourceTermUnit = kg/(s*m^3)
    peq1: PoissonEquation "Poisson's Equation 1" (default) | f = -CMRO2*(u/(u+u_0)); c = {Dd, 0, 0, Dd}
    zflx1: ZeroFluxBoundary "Zero Flux 1" (default)
    init1: init "Initial Values 1" (default)
    dir1: DirichletBoundary "Dirichlet Boundary Condition 1" on boundaries 1-4 | r = 0
    flux1: FluxBoundary "Flux/Source 1" on boundaries 5, 6, 9, 10, 27, 28, 31, 32, 37, 38, 41, 42, 45, 46, 49, 50, 69-72
      g = 0
      q = Com_con
    pc1: PeriodicCondition on boundaries 2, 3 | destinationDomains: boundaries 3
    zflx2: ZeroFluxBoundary "Zero Flux 2" on boundaries 2-4
    flux2: FluxBoundary "Flux/Source 2" on boundaries 7, 8, 11-26, 29, 30, 33-36, 39, 40, 43, 44, 47, 48, 51-68
      g = Com_con
      q = Com_con

Mesh
  mesh1 "Mesh 1" (physics-controlled)
    size: MeshSizeDefault | hauto = 4

Studies
  std1 "Study 1"
    stat: Stationary

Solver configurations
  sol1 "Solution 1" (study std1)
    v1: Variables "Dependent Variables 1"
    s1: Stationary "Stationary Solver 1"
      dDef: Direct
      fc1: FullyCoupled | linsolver = dDef

Datasets
  dset1: Solution | solution = sol1
  cln1: CutLine2D "phi along x" | data = dset1; genpoints = {{0, pos_y}, {L, pos_y}}
  cln2: CutLine2D "phi along y" | data = dset1; genpoints = {{pos_x, 0}, {pos_x, L}}
  dset2: Solution | solution = sol1
  cln3: CutLine2D "phi along x_metab" | data = dset1; genpoints = {{0, pos_y}, {L, pos_y}}
  cln4: CutLine2D "phi along y_metab" | data = dset1; genpoints = {{pos_x, 0}, {pos_x, L}}

Derived values
  int1: IntLine "Line Integration 1" on boundaries 33-36
    data = dset1
    expr = poeq.g_u
    unit = kg/(m*s)
    descr = Boundary flux/source
  int2: IntLine "Line Integration 2" on boundaries 19, 20, 23, 24
    data = dset1
    expr = poeq.g_u
    unit = kg/(m*s)
    descr = Boundary flux/source
  int3: IntLine "Line Integration 3" on boundaries 45, 46, 49, 50
    data = dset1
    expr = poeq.g_u
    unit = kg/(m*s)
    descr = Boundary flux/source
  int4: IntLine "Line Integration 4" on boundaries 17, 18, 21, 22
    data = dset1
    expr = poeq.g_u
    unit = kg/(m*s)
    descr = Boundary flux/source
  int5: IntLine "Line Integration 5" on boundaries 39, 40, 43, 44
    data = dset1
    expr = poeq.g_u
    unit = kg/(m*s)
    descr = Boundary flux/source
  int6: IntLine "Line Integration 6" on boundaries 69-72
    data = dset1
    expr = poeq.g_u
    unit = kg/(m*s)
    descr = Boundary flux/source
  int7: IntLine "Line Integration 7" on boundaries 65-68
    data = dset1
    expr = poeq.g_u
    unit = kg/(m*s)
    descr = Boundary flux/source
  int8: IntLine "Line Integration 8" on boundaries 25, 26, 29, 30
    data = dset1
    expr = poeq.g_u
    unit = kg/(m*s)
    descr = Boundary flux/source
  int9: IntLine "Line Integration 9" on boundaries 37, 38, 41, 42
    data = dset1
    expr = poeq.g_u
    unit = kg/(m*s)
    descr = Boundary flux/source
  int10: IntLine "Line Integration 10" on boundaries 47, 48, 51, 52
    data = dset1
    expr = poeq.g_u
    unit = kg/(m*s)
    descr = Boundary flux/source
  int11: IntLine "Line Integration 11" on boundaries 53-56
    data = dset1
    expr = poeq.g_u
    unit = kg/(m*s)
    descr = Boundary flux/source
  int12: IntLine "Line Integration 12" on boundaries 5, 6, 9, 10
    data = dset1
    expr = poeq.g_u
    unit = kg/(m*s)
    descr = Boundary flux/source
  int13: IntLine "Line Integration 13" on boundaries 7, 8, 11, 12
    data = dset1
    expr = poeq.g_u
    unit = kg/(m*s)
    descr = Boundary flux/source
  int14: IntLine "Line Integration 14" on boundaries 25, 26, 29, 30
    data = dset1
    expr = poeq.g_u
    unit = kg/(m*s)
    descr = Boundary flux/source
  int15: IntLine "Line Integration 15" on boundaries 27, 28, 31, 32
    data = dset1
    expr = poeq.g_u
    unit = kg/(m*s)
    descr = Boundary flux/source
  int16: IntLine "Line Integration 16" on boundaries 57-60
    data = dset1
    expr = poeq.g_u
    unit = kg/(m*s)
    descr = Boundary flux/source
  int17: IntLine "Line Integration 17" on boundaries 61-64
    data = dset1
    expr = poeq.g_u
    unit = kg/(m*s)
    descr = Boundary flux/source

Evaluation groups
  eg1: EvaluationGroup | data = dset1
    int1: IntLine "Line Integration 1" on boundaries 33-36 | data = dset1; expr = poeq.g_u
    int2: IntLine "Line Integration 2" on boundaries 19, 20, 23, 24 | data = dset1; expr = poeq.g_u
    int3: IntLine "Line Integration 3" on boundaries 45, 46, 49, 50 | data = dset1; expr = poeq.g_u
    int4: IntLine "Line Integration 4" on boundaries 17, 18, 21, 22 | data = dset1; expr = poeq.g_u
    int5: IntLine "Line Integration 5" on boundaries 39, 40, 43, 44 | data = dset1; expr = poeq.g_u
    int6: IntLine "Line Integration 6" on boundaries 69-72 | data = dset1; expr = poeq.g_u
    int7: IntLine "Line Integration 7" on boundaries 65-68 | data = dset1; expr = poeq.g_u
    int8: IntLine "Line Integration 8" on boundaries 25, 26, 29, 30 | data = dset1; expr = poeq.g_u
    int9: IntLine "Line Integration 9" on boundaries 37, 38, 41, 42 | data = dset1; expr = poeq.g_u
    int10: IntLine "Line Integration 10" on boundaries 47, 48, 51, 52 | data = dset1; expr = poeq.g_u
    int11: IntLine "Line Integration 11" on boundaries 53-56 | data = dset1; expr = poeq.g_u
    int12: IntLine "Line Integration 12" on boundaries 5, 6, 9, 10 | data = dset1; expr = poeq.g_u
    int13: IntLine "Line Integration 13" on boundaries 7, 8, 11, 12 | data = dset1; expr = poeq.g_u
    int14: IntLine "Line Integration 14" on boundaries 25, 26, 29, 30 | data = dset1; expr = poeq.g_u
    int15: IntLine "Line Integration 15" on boundaries 27, 28, 31, 32 | data = dset1; expr = poeq.g_u
    int16: IntLine "Line Integration 16" on boundaries 57-60 | data = dset1; expr = poeq.g_u
    int17: IntLine "Line Integration 17" on boundaries 61-64 | data = dset1; expr = poeq.g_u

Tables
  tbl1: Table
    // Line Integration 1
    Boundary flux/source (kg/(m*s))
    0.710939

Plots
  pg1: PlotGroup2D "2D Plot Group 1" | data = dset1
    surf1: Surface | expr = u
  pg2: PlotGroup1D "1D Plot Group 2" | data = cln1
    lngr1: LineGraph "graph phi along x_s"
      data = cln1
      expr = u
      prefixintitle = graph phi along x_s
      title = graph phi along x_s
    lngr2: LineGraph "graph phi along y_s" | data = cln2; expr = u; title = graph phi along y_s

Exports
  tbl1: Table "base_q"
    source = evaluationgroup
    table = tbl1
    filename = /home/pdavid/Bureau/Code/SS_auto57/2D_cartesian/Updated_BCs/Tool_Validation/COMSOL_output/linear/q.txt
  plot4: Plot "Contour"
    filename = /home/pdavid/Bureau/Code/SS_auto57/2D_cartesian/Updated_BCs/Tool_Validation/COMSOL_output/linear/Contour.txt